// SBML level 3 version 1
// SBML generated from Reactome version 95 on 11/25/25, 4:14 AM using JSBML version 1.5.

model pathway_1855192()
  // IPs transport between nucleus and ER lumen
  // Inositol phosphate IP6 is imported to the endoplasmic reticulum (ER) lumen from the nucleus (Caffrey et al. 1999). The molecular details of these transport processes remain uncertain.
  // reactome:R-HSA-1855192 GO:0033271
  // isDescribedBy pubmed:9923613

  // Compartments:
  compartment endoplasmic_reticulum_lumen;  // GO:0005788
  compartment nucleoplasm;  // GO:0005654

  // Species:
  // Derived from a Reactome SimpleEntity. This is a small compound
  species IP6_endoplasmic_reticulum_lumen in endoplasmic_reticulum_lumen; IP6_endoplasmic_reticulum_lumen is "IP6 [endoplasmic reticulum lumen]";  // reactome:R-ALL-2024018
  // Derived from a Reactome SimpleEntity. This is a small compound
  species IP6_nucleoplasm in nucleoplasm; IP6_nucleoplasm is "IP6 [nucleoplasm]";  // reactome:R-ALL-2023929

  // Parameters:
  Ku = 10;
  Ur = 0.7;
  lambda_1 = 3;

  // Reactions:
  // Inositol 1,2,3,4,5,6-hexakisphosphate (IP6) translocates from the nucleus to the endoplasmic reticulum (ER) lumen (Caffrey et al. 1999).
  reaction_1855187: IP6_nucleoplasm => IP6_endoplasmic_reticulum_lumen; lambda_1*IP6_nucleoplasm^1; reaction_1855187 is "IP6 transports from the nucleus to the ER lumen";  // reactome:R-HSA-1855187 GO:0051169; isDescribedBy pubmed:9923613; reactome:R-HSA-1855187; GO:0051169
  reaction_input_clamping: => IP6_nucleoplasm; Ku*(Ur - IP6_nucleoplasm);
end
